# OpenSim document version 40500
MarkerSet:
  Marker RASIS: pelvis (0.006649956 -0.003887745 0.1334381)
  Marker LASIS: pelvis (0.001084023 0.01244077 -0.1415196)
  Marker RPSIS: pelvis (-0.1712528 0.03442543 0.03715176)
  Marker LPSIS: pelvis (-0.1718278 0.03735669 -0.0224477)
  Marker RTH1: femur_r (-0.03812828 -0.1284066 0.08307258)
  Marker RTH2: femur_r (0.04559205 -0.1307206 0.07534061)
  Marker RTH3: femur_r (0.05155393 -0.225435 0.06488398)
  Marker RTH4: femur_r (-0.03352339 -0.2282264 0.07255069)
  Marker RFLE: femur_r (-0.007514618 -0.4136169 0.04748706)
  Marker RFME: femur_r (-0.0110948 -0.4348859 -0.07471618)
  Marker RFAL: tibia_r (-0.0206626 -0.4533624 0.02822518)
  Marker RTAM: tibia_r (0.00383375 -0.4327737 -0.06115373)
  Marker RSK1: tibia_r (-0.05858142 -0.1148721 0.07552398)
  Marker RSK2: tibia_r (-0.00018369 -0.1167759 0.07347749)
  Marker RSK4: tibia_r (-0.06719018 -0.2035247 0.06590924)
  Marker RSK3: tibia_r (-0.005109275 -0.2090569 0.06370478)
  Marker RFCC: calcn_r (-0.01114744 0.02165984 -0.03646433)
  Marker RFMT1: calcn_r (0.1990474 0.02739332 -0.02503839)
  Marker RFMT2: calcn_r (0.1832952 0.02339864 0.01148571)
  Marker RFMT5: calcn_r (0.1500984 0.01164664 0.04803376)
  Marker LTH1: femur_l (-0.03596861 -0.1591915 -0.09160012)
  Marker LTH2: femur_l (0.04920543 -0.1593487 -0.08190935)
  Marker LTH3: femur_l (0.0445442 -0.2606989 -0.0725058)
  Marker LTH4: femur_l (-0.03532733 -0.2607187 -0.07905787)
  Marker LFME: femur_l (-0.009024461 -0.437444 0.05218542)
  Marker LFLE: femur_l (-0.02941236 -0.4164748 -0.07054439)
  Marker LSK1: tibia_l (-0.06598661 -0.1179102 -0.07388586)
  Marker LSK2: tibia_l (-0.003533577 -0.1095074 -0.06240594)
  Marker LSK4: tibia_l (-0.05790214 -0.2066047 -0.06940939)
  Marker LSK3: tibia_l (0.002701572 -0.2010366 -0.05762623)
  Marker LFAL: tibia_l (-0.02169642 -0.4391697 -0.02906455)
  Marker LTAM: tibia_l (0.003032922 -0.4179812 0.05525849)
  Marker LFCC: calcn_l (-0.005255099 0.03951842 0.03420655)
  Marker LFMT1: calcn_l (0.2029117 0.03368804 0.02547549)
  Marker LFMT2: calcn_l (0.1797356 0.02867705 -0.01055721)
  Marker LFMT5: calcn_l (0.1436865 0.008155005 -0.04960761)
