# OpenSim document version 40000
AnalyzeTool subject03_stw1:
  model_file: ../../model/RajagopalLa2023_LL-stw_adjustedWieghts.osim
  replace_force_set: false
  force_set_files: cmc_actuators.xml
  results_directory: result_SO
  output_precision: 8
  initial_time: 4
  final_time: 5.62
  solve_for_equilibrium_for_auxiliary_states: false
  maximum_number_of_integrator_steps: 20000
  maximum_integrator_step_size: 1
  minimum_integrator_step_size: 1e-8
  integrator_error_tolerance: 1e-5
  external_loads_file: ../ID/grf/grf_S03_stw1.xml
  coordinates_file: ../IK/results_stw/ik_output_s03_stw1.mot
  lowpass_cutoff_frequency_for_coordinates: 6
  AnalysisSet Analyses:
    StaticOptimization: start_time=4 end_time=5.62 step_interval=1 in_degrees=true use_model_force_set=true
        activation_exponent=2 use_muscle_physiology=true optimizer_convergence_criterion=0.0001
        optimizer_max_iterations=100
